*HEADING
v0.8 torsion qualification; SI
*NODE
1,0.000000000,-0.010000000,-0.010000000
2,0.000000000,-0.010000000,-0.006666667
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*ELEMENT,TYPE=C3D8,ELSET=EALL
1,1,50,57,8,2,51,58,9
2,2,51,58,9,3,52,59,10
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*NSET,NSET=FIXED
1,2,3,4,5,6
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*NSET,NSET=FREE
1177,1178,1179,1180,1181,1182
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*SOLID SECTION,ELSET=EALL,MATERIAL=STEEL
*MATERIAL,NAME=STEEL
*ELASTIC
205000000000.0,0.29
*BOUNDARY
FIXED,1,6,0
*STEP
*STATIC
0.1,1
*CLOAD
1177,2,50.5102040816
1177,3,-50.5102040816
1178,2,33.6734693878
1178,3,-50.5102040816
1179,2,16.8367346939
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1225,3,50.5102040816
*NODE PRINT,NSET=FREE
U
*NODE PRINT,NSET=FIXED,TOTALS=YES
RF
*END STEP
