*HEADING
TPU uncalibrated coupon sensitivity
*NODE
1,0.0,0,0
2,0.0,5.0,0
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*ELEMENT,TYPE=C3D8,ELSET=ALL
1,1,5,6,2,4,8,7,3
2,5,9,10,6,8,12,11,7
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*NSET,NSET=LEFT
1,2,3,4
*NSET,NSET=RIGHT
65,66,67,68
*MATERIAL,NAME=TPU
*HYPERELASTIC,NEO HOOKE
3.333,0.006
*SOLID SECTION,ELSET=ALL,MATERIAL=TPU
*STEP,NLGEOM=YES,INC=200
*STATIC
.05,1.,1e-8,.1
*BOUNDARY
LEFT,1,3,0
RIGHT,1,1,2.0
*NODE PRINT,NSET=RIGHT
RF,U
*EL PRINT,ELSET=ALL
S,E
*END STEP
